<?xml version="1.0"?>
<propeller name="prop">
  <ixx> 3.1983 </ixx>
  <diameter unit="IN"> 78.0 </diameter>
  <numblades> 3 </numblades>
  <gearratio>1.0</gearratio>
  <minpitch> 12 </minpitch>
  <maxpitch> 30 </maxpitch>
  <minrpm>   1600 </minrpm>
  <maxrpm>   2700 </maxrpm>

  <table name="C_THRUST" type="internal">
      <tableData>
                12         30
       0.0      0.0480   0.0880
       2.0      -0.1297   -0.0609
      </tableData>
  </table>
<!--
power_required = rps^3 * d^5 * rho * C_POWER
max_power*percentage_power / ( rps^3 * d^5 * rho ) = C_POWER
-->

  <table name="C_POWER" type="internal">
     <tableData>
                12         30
       0.0      0.0719     0.143
       1.0      0.0        0.0719
       2.0      -0.0719    -0.143
     </tableData>
  </table>

</propeller>

<!--
       0.0      0.0480   0.0880
       2.0      -0.1297   -0.0609

       0.0      0.0559   0.1159
       2.0      -0.2793   -0.1413
-->
